// COMSOL Multiphysics 5.4.0.388 model "static_particle_Newtonian_model_with_crystal_size_sweep.mph"
// Outline of the model tree

Parameters
  crystal_rad = 0.05 [mm]
  world_size1 = crystal_rad*500
  sliding_speed = 167 [mm/s]
  world_thickness = 1 [mm]
  world_length = 0.1*2*pi*(8 [mm])
  RPM = 400
  corner_sharpness = 2e-6 [m]

Selections
  spf_dst_pfc1: Explicit on boundaries 8
  ht_dst_pc1: Explicit "Explicit 1a" on boundaries 8

Probes
  dom1: Domain "max_temp" on domains 1 | type = maximum; expr = ht.T - (293.15[K]); unit = K; table = tbl1
  dom2: Domain "max_shear_rate" on domains 1 | type = maximum; expr = spf.sr; unit = 1/s; descr = Shear rate; table = tbl1
  dom3: Domain "avg_shear_rate" on domains 1 | expr = spf.sr; unit = 1/s; descr = Shear rate; table = tbl1

Common definitions
  amth_ht: AmbientThermalProperties "Ambient Thermal Properties (ht)"

Geometry
  geom1 "Geometry 1" (2D, length unit m)
    r1: Rectangle "World" | base = center; size = {world_length, world_thickness}
    c1: Circle "Crystal" (disabled) | r = crystal_rad
    sq1: Square | base = center; size = crystal_rad*2
    fil1: Fillet | point = sq1(1) points 1-4; radius = corner_sharpness
    fin: Finalize "Form Union"

Materials
  mat1: Common "Water, liquid" on all domains
    def "Basic"
      dynamicviscosity = 0.11
      ratioofspecificheat = 1.0
      electricconductivity = 5.5e-6[S/m]
      heatcapacity = 1998
      density = 1600
      thermalconductivity = 0.184/0.591*k(T[1/K])[W/(m*K)]
      soundspeed = cs(T[1/K])[m/s]
      eta: Piecewise
        arg = T
        pieces = 
          {273.15, 413.15, 1.3799566804-0.021224019151*T^1+1.3604562827E-4*T^2-4.6454090319E-7*T^3+8.9042735735E-10*T^4-9.0790692686E-13*T^5+3.8457331488E-16*T^6}
          {413.15, 553.75, 0.00401235783-2.10746715E-5*T^1+3.85772275E-8*T^2-2.39730284E-11*T^3}
      Cp: Piecewise | arg = T; pieces = {273.15, 553.75, 12010.1471-80.4072879*T^1+0.309866854*T^2-5.38186884E-4*T^3+3.62536437E-7*T^4}
      rho: Piecewise | arg = T; pieces = {273.15, 553.75, 838.466135+1.40050603*T^1-0.0030112376*T^2+3.71822313E-7*T^3}
      k: Piecewise | arg = T; pieces = {273.15, 553.75, -0.869083936+0.00894880345*T^1-1.58366345E-5*T^2+7.97543259E-9*T^3}
      cs: Interpolation | table = {{273, 1403}, {278, 1427}, {283, 1447}, {293, 1481}, {303, 1507}, {313, 1526}, {323, 1541}, {333, 1552}, {343, 1555}, {353, 1555}, {363, 1550}, {373, 1543}}; interp = piecewisecubic
  mat2: Common "Transformer oil" (disabled) on all domains
    def "Basic"
      dynamicviscosity = eta(T[1/K])[Pa*s]
      heatcapacity = Cp(T[1/K])[J/(kg*K)]
      density = rho(T[1/K])[kg/m^3]
      thermalconductivity = k(T[1/K])[W/(m*K)]
      ratioofspecificheat = 1
      eta: Piecewise
        arg = T
        pieces = 
          {243.0, 273.0, 4492.20229-64.7408879*T^1+0.349900959*T^2-8.40477E-4*T^3+7.57041667E-7*T^4}
          {273.0, 373.0, 91.4524999-1.33227058*T^1+0.00777680216*T^2-2.27271368E-5*T^3+3.32419673E-8*T^4-1.94631023E-11*T^5}
      Cp: Piecewise
        arg = T
        pieces = 
          {223.0, 293.0, -117056.38+1816.76208*T^1-10.305786*T^2+0.0256691919*T^3-2.36742424E-5*T^4}
          {293.0, 373.0, -13408.1491+123.044152*T^1-0.335401786*T^2+3.125E-4*T^3}
      rho: Piecewise | arg = T; pieces = {223.0, 373.0, 1055.04607-0.581753034*T^1-6.40531689E-5*T^2}
      k: Piecewise | arg = T; pieces = {223.0, 373.0, 0.134299084-8.04973822E-5*T^1}

Physics
  spf: LaminarFlow on domains 1
    dependent variable u = {u, v, w}
    PhysicalModelProperty.StokesFlowProp = 0
    AdvancedSettingProperty.UsePseudoTime = 1
    fp1: FluidProperties (default)
    init1: init "Initial Values 1" (default) | u_init = {y/(world_thickness/2)*sliding_speed/2, 0, 0}
    wall1: Wall (default) | BoundaryCondition = NoSlip; uvw = sliding_speed/2*(0.999)
    pfc1: PeriodicFlowCondition (disabled) on boundaries 1, 8 | destinationDomains: boundaries 8
    wall2: Wall on boundaries 3 | BoundaryCondition = SlidingWall; uvw = sliding_speed/2
    prpc1: PressurePointConstraint on points 2
    out1: OutletBoundary "Outlet 1" on boundaries 1
      BoundaryCondition = Velocity
      ComponentWise = VelocityFieldComponentWise
      u0 = {y/(world_thickness/2)*sliding_speed/2, 0, 0}
    inl1: InletBoundary "Inlet 1" on boundaries 8
      ComponentWise = VelocityFieldComponentWise
      u0 = {y/(world_thickness/2)*sliding_speed/2, 0, 0}
    wall3: Wall on boundaries 2 | BoundaryCondition = SlidingWall; uvw = sliding_speed/2*(0.999)
  ht: HeatTransferInFluids on domains 1
    dependent variable T
    ShapeProperty.order_temperature = 1
    PhysicalModelProperty.dz = 1[m]
    fluid1: FluidHeatTransferModel "Heat Transfer in Fluids 1" (default)
    init1: init "Initial Values 1" (default)
    ins1: ThermalInsulation (default)
    temp1: TemperatureBoundary "Temperature 1" on boundaries 1-3, 8
    pc1: PeriodicHeat "Periodic Condition 1" on boundaries 1, 8 | destinationDomains: boundaries 8

Multiphysics
  nitf1: NonIsothermalFlow on all domains
    SpecifyDensity = FromFluidFlowInterface
    includeWorkDoneByPressureChanges = 1
    includeViscousDissipation = 1
    Fluid_physics = spf
    Heat_physics = ht

Mesh
  mesh1 "Mesh 1"
    size: MeshSizeDefault | hmax = 1.01E-4; hmin = 3.77E-7; hcurve = 0.25; hgrad = 1.2; hauto = 2
    size1: Size on domains 1, 2 | table = cfd; hmax = 2.8E-5; hmin = 4.0E-7; hcurve = 0.25; hauto = 3
    size2: Size on boundaries 1, 8 | table = cfd; hmax = 2.8E-5; hmin = 4.0E-7; hcurve = 0.25; hauto = 3
    size3: Size on boundaries 2-7, 9-12 | table = cfd; hmax = 6.7E-6; hmin = 2.0E-8; hcurve = 0.2; hgrad = 1.05; hauto = 1
    size4: Size on boundaries 4-7, 9-12 | hmin = corner_sharpness/10; hcurve = 0.01; hauto = 1; custom = on
    edg1: Edge on boundaries 1
    copy1: Copy | mesh = mesh1; source = boundaries 1; destination = boundaries 8
    cr1: CornerRefinement on domains 1, 2 | boundary = boundaries 2-7, 9-12
    ftri1: FreeTri "Free Triangular 1" on domains 1, 2
    bl1: BndLayer "Boundary Layers 1" on domains 1, 2 | sharpcorners = trim; trimmaxangle = 20
      blp1: BndLayerProp "Boundary Layer Properties 1" on boundaries 2-7, 9-12
        blnlayers = 2
        blhminfact = 5
        blhmin = 3.37E-5

Studies
  std1 "Study 1"
    param: Parametric "Parametric Sweep" (disabled)
      sweeptype = filled
      pname = crystal_rad
      plistarr = range(0.004, 0.02, 0.45)
      punit = mm
      useaccumtable = on
      accumtable = new
    stat: Stationary

Solver configurations
  sol1 "Solution 1" (study std1)
    v1: Variables "Dependent Variables 1"
    s1: Stationary "Stationary Solver 1"
      se1: Segregated | maxsegiter = 200; segstabacc = segcflcmp
        ss1: SegregatedStep | segvar = {comp1_u, comp1_p}; linsolver = d1; subdamp = 0.5
        ss2: SegregatedStep | linsolver = d2; subdamp = 0.8
        ht1: SegregatedStep "Segregated Step 1a"
      d1: Direct | linsolver = pardiso
      d2: Direct | linsolver = pardiso
  sol2 "Parametric Solutions 1" (study std1)
  sol28 "Parametric Solutions 2" (study std1)

Datasets
  dset1: Solution | solution = sol1
  dset2: Solution "Probe Solution 2" | solution = sol1
  max1: Maximum "max_temp" on domains 1 | data = dset2
  max2: Maximum "max_shear_rate" on domains 1 | data = dset2
  avh1: Average "avg_shear_rate" on domains 1 | data = dset2
  dset3: Solution | solution = sol2
  dset4: Solution | solution = sol28

Derived values
  pev1: EvalPoint "max_temp" | data = max1; table = tbl1; expr = ht.T - (293.15[K])
  pev2: EvalPoint "max_shear_rate" | data = max2; table = tbl1; expr = spf.sr
  pev3: EvalPoint "avg_shear_rate" | data = avh1; table = tbl1; expr = spf.sr

Tables
  tbl1: Table "Probe Table 1"
    ht.T - (293.15[K]) (K), max_temp | Shear rate (1/s), max_shear_rate | Shear rate (1/s), avg_shear_rate
    0.0020598 | 1055.22 | 167.413

Plots
  pg2: PlotGroup2D "Shear stress" | data = dset1
    surf1: Surface | expr = spf.sr; descr = Shear rate
    arws1: ArrowSurface | expr = {u, v}; xnumber = 900; ynumber = 500; arrowlength = normalized
    str1: Streamline on all boundaries | expr = {u, v}; udist = 0.0005
  pg3: PlotGroup2D "Temperature (ht)" | data = dset1
    surf1: Surface | expr = T - (293.15[K])
  pg4: PlotGroup2D "Isothermal Contours (ht)" | data = dset1
    con1: Contour | expr = T
  pg5: PlotGroup2D "Temperature (ht) 1" | data = dset1
    surf1: Surface | expr = T-293.15
  pg6: PlotGroup1D "Probe Plot Group 6"
    tblp1: Table "Probe Table Graph 1" | table = tbl1; plotcolumns = {1, 2, 3}
  pg7: PlotGroup2D "Shear stress 1" | data = dset1
    surf1: Surface | expr = spf.sr; descr = Shear rate
    arws1: ArrowSurface | expr = {u, v}; xnumber = 300; ynumber = 150; arrowlength = normalized
    str1: Streamline on all boundaries | expr = {u, v}; udist = 0.001
  pg1: PlotGroup2D "Shear stress B" | data = dset1
    surf2: Surface | expr = spf.sr
    arws2: ArrowSurface (disabled) | expr = {u, v}
  pg8: PlotGroup2D "Velocity" | data = dset1
    surf1: Surface | expr = spf.U
    str1: Streamline on all boundaries | expr = {u, v}; udist = 0.002
    arws1: ArrowSurface | expr = {u, v}; xnumber = 200; ynumber = 100; arrowlength = normalized
  pg9: PlotGroup2D "Pressure" | data = dset1
    surf2: Surface | expr = p; descr = Pressure
    arws2: ArrowSurface (disabled) | expr = {u, v}